# 2.Memoriu justificativ de calcul
M_max := 240  # Nm
n_Mmax := 1800  # rpm
P_max := 74  # kw
n_Pmax := 4000  # rpm
β := 1.4
M_c := β*M_max = 336  # Nm
λ := 2.7
i := 2
c := 0.58
B := 4.7
R_max := 112.90  # mm
Rmax := 1.58*sqrt(M_max/B) = 11.2905
# Diametrul interior, exterior și grosimea garniturii de frecare se alege conform STAS 7793-83
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# Dimensiunile garniturilor de frecare pentru ambreiaje în [mm]
# Parametrii discului de ambreiaj
# - Diametrul exterior:
D_e := 225  # mm
# - Diametrul interior:
D_i := 150  # mm
# - Grosime:
g := 3.5  # mm
# - Lungime radiala:
L := (D_e - D_i)/2 = 37.5  # mm
R_max := D_e/2 = 112.5  # mm  # - raza exterioara
R_min := D_i/2 = 75  # mm  # - raza interioara
R_med := 2*(R_max^3 - R_min^3)/(3*(R_max^2 - R_min^2)) = 95  # mm  # - raza medie
# Calculul garniturilor de frecare
# Se calculeaza suprafata garniturii de frictiune cu relatia :
A := π*(R_max^2 - R_min^2)*i = 44178.6
A := 441.78  # cm^2
# - coeficientul de frecare
μ := 0.25 .. 0.3
μ := 0.3
# Presiunea specifica
# Forta de apasare asupra discurilor ambreiajului este:
F_a := β*M_max*10^3/(i*μ*(D_e + D_i)/4) = 5973.33  # N
# Suprafata unei garnituri de frecare:
A1 := π/4*(D_e + D_i)*(D_e - D_i) = 22089.3  # mm^2
# Presiunea specifica dimtre discurile ambreiajului se calculeaza cu relatia:
p_0 := F_a/A1 = 0.270417  # Mpa
# Se admit urmatoarele limite: p= 0.17...0.35 Mpa in cazul garniturilor pe baza de asbest, iar pentru cele metaloceramice p=1.5...2 Mpa.
# Verificarea discului de ambreiaj la uzura
# Pentru aprecierea uzurii garniturilor de frictiune se foloseste ca parametru lucrul mecanic specific de frictiune dat de relatia:
L_s := L/(i - A)  # daN*m/cm^2
# unde: | -L: lucrul mecanic de frictiune la patinarea ambreiajului
# -i: numarul de suprafete de frictiune
# -A: suprafata unei garnituri de frictiune
# Pentru calcule aproximative se utilizeaza relatia:
L_f := 357.3*G_a*r_r^2/(i_s1^2*i_o^2)  # error: This variable is undefined.
# unde: | G_a | greutatea totala a automobilului in [daN]
# r_r | raza de rulare a rotilor in [m]
# i_s1 | raportul de transmitere al schibatorului de viteze
# i_o | raportul de transmitere al transmisiei principale
# Pentru calculul lucrului mecanic de patinare se definesc urmatoarele marimi :
# - turatia la puterea maxima :
n_Pmax := 4000  # rot/min
# - turatia la viteza maxima :
# valorile intre care se ia n_vmax sunt:(1.05...1.25)*n_Pmax
n_vmax := 1.15*n_Pmax
n_vmax = 4600  # rot/min
# - viteza maxima a automobilului :
v_max := 52.22  # m/s
# - latimea profilului anvelopei :
B := 195  # mm
# - diametrul interior al anvelopei :
d := 15  # inch
d := 15*25.4
d = 381  # mm
# - inaltimea profilului anvelopei :
H := 0.65*B
H = 126.75  # mm
# - diametrul exterior al anvelopei :
D_u := d + 2*H
D_u = 634.5  # mm
# - raza nominala a rotii :
r_n := D_u/2
r_n = 317.25  # mm
# - raza libera a rotii :
r_0 := r_n
r_0 = 317.25  # mm
# - coeficientul de deformare :
λ := 0.930 .. 0.935  # pentru pneurile de joasa presiune
λ := 0.933
# - raza de rulare a rotii
r_r := λ*r_0
r_r = 295.994  # mm
r_r := 0.295994  # m
# - raportul de transmitere al transmisiei principale este :
i_0 := π*n_vmax*r_r/(30*v_max)
i_0 = 2.73044
# - presiunea de umflare a pneului:
p_a := 2.2  # bar
# - panta maxima :
α_max := 20 deg
# - coeficientul de rezistenta la rulare :
f_rul := (0.019/nthroot(p_a^2, 3) + 0.00245/sqrt(p_a)*(v_max/100)^2 + 0.0042/nthroot(p_a^4, 3)*(v_max/100)^3)
f_rul = 0.0118918
# - coeficientul rezistentei totale a drumului
ψ := f_rul*cos(α_max) + sin(α_max)
ψ = 0.353195
# - greutatea totala a automobilului :
G_a := 1205  # daN
# - raportul de transmitere al schimbatorului de viteze :
i_s := 3.81
# Lucrul mecanic de frecare la patinare se determina cu relatia :
L_f := 357.3*G_a*r_r^2/(i_s^2*i_0^2) = 348.555  # daN*m/cm^2
# Calculul lucrului mecanic specific de frecare
# Se cunosc:
# - suprafata garniturii de frictiune :
A = 441.78  # cm^2
# - numarul de perechi de suprafete de frecare :
i = 2
# - lucrul mecanic de patinare :
L_f = 348.555  # Nm
# Pentru aprecierea uzurii garnituriilor de frecare se foloseste ca parametru  lucrul specific de frecare dat de relatia:
L_s := L_f/(2*A) = 0.394489  # daNm/cm^2
# Calculul arcului de presiune
# Dimensionare
F := β*M_max*1000/(i*μ*R_med) = 5894.74  # N
# Pentru calcule se folosesc urmatoarele notatii:
# - d1, d2, d3, s, H, h - dimensiunile arcului diafragma;
# - 1, 2, 3, 4 - pozitia reazemelor;
# - z - numarul de brate;
# - a - unghiul sectorului care revine unui brat (a=3600/z);
# - F - forta de ambreiere;
# - Q - forta de debreiere;
# - F1, Q1 - fortele de ambreiere si debreiere ce revin unui sector al modelului (F1=F/z, Q1=Q/z)
D_e = 225
d_i := 24.5
# Diametrul exterior al arcului diafragmă
D_earc := 0.95*D_e = 213.75
D_earc := 215  # mm
# Diametrul interior al arcului diafragmă
D_iarc := 1.6*d_i = 39.2
D_iarc := 40  # mm
# Înclinarea arcului diafragmă:
ϕ := 11  # grade
# Modulul de elasticitate al materialului:
E := 210000
# Raza discului de presiune:
b := D_earc/2*0.96 = 103.2  # mm
c := D_e/2*0.77 = 86.625  # mm
# Raza arcului diafragmă
a := c - 3.5 = 83.125  # mm
# Grosimea diafragmei:
h := 2.5
# Grosime disc presiune și arc
H := h*sqrt(2) = 3.53553  # mm
f_1 := 1
# Calculul forței de apăsare la prestrângerea arcului
var := (b/a)*((H/h - (f_1/h*(b - a)/(b - c)))*(H/h - (f_1/(2*h)*(b - a)/(b - c))) + 1) = 2.59431
F_1 := (π*E*h^4)/(6*(b - c)^2)*f_1/h*ln(var) = 5961.69  # N
# Verificarea presiunii asupra garniturilor de fricțiune
z := 18  # numarul lamelelor
δ_1 := 3.5
l_1 := (2*π*(a + e)/2 - δ_1*z)/z = 11.4825
η_1 := l_1*z/(π*(a + c)) = 0.387569
α := H/(b - e) = 0.0351858
d := (b - a)/ln(b/a) = 92.8009
μ := 0.25
σ_c := E/(2*(1 + μ^2))*((d - a)*α^2 + h*α)/a = 118.819
# Calculul forței de decuplare
f_2 := f_1*(c - a)/(b - c) = 0.211161
var_1 := (b/a)*((H/h - (f_2/h*(b - a)/(c - a)))*(H/h - (f_2/(2*h)*(b - a)/(c - a))) + 1) = 2.59431
F_2 := π*E*h^4/(6*(c - a)^2)*f_2/h*ln(b/a)*((H/h - (f_2/h*(b - a)/(c - a)))*(H/h - (f_2/(2*h)*(b - a)/(c - a)))) = 6980.82
# Verificarea arcului la solicitări compuse
# Efortul unitar la încovoiere:
σ_i := F_2/(h^2*η_1)*3/π = 2752  # N/cm^2
# Efortul unitar echivalent:
σ_ech := σ_i - σ_c = 2633.19  # N/cm^2
# Calculul arborelui ambreiajului.  Verificare.
# Dimensionare
# τ_ta | = 1000...1200 | daN/cm^2
τ_ta := 1200  # daN/cm^2
d_iarb := nthroot(M_c*10^4/(0.2*τ_ta), 3)
d_iarb = 24.1014
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# Elemente comune asamblării:
# D- diametrul nominal al asamblării (diametrul de cap al arborelui da1)
# d- diametrul de divizare
# p-pasul de divizare
# x- deplasarea profilului de referință
# z- numărul de dinți
# Elementele arborelui:
# d_a1 | -diametrul de cap
# d_f1 | -diametrul de picior
# r_1 | - raza de racordare la piciorul canelurii
# β | -unghiul format de flancurile canelurii
# Elementele butucului:
# d_a2 | -diametrul de cap
# d_f2 | -diametrul de picior
# r_2 | - raza de racordare la piciorul canelurii
# γ | -unghiul format de flancurile canelurii (D<60mm)
# Δ | -unghiul format de flancurile dintelui (Δ>sau=65mm)
# Parametrii arborelui conform STAS 7346-85
# - dimensiunile principale a asamblării canelate
D := 24  # mm
d := 22  # mm
p := 2.03
z := 34
# - arbore
d_i := 20.76
d_f1 := 20.76
d_a1 := 23.9
r_1 := 0.25
# -butuc
d_a2 := 20.8
d_f2 := 23.76
γ := 492442
r2 := 0.150
β := 60
l := 2.8  # cm  # - lungimea butucului discului condus
h := 0.148  # cm  # - înălțimea canelurii supuse la strivire
b := 0.2  # cm
# Verificare
# Verificarea canelurii la strivire
D := 2.4  # cm
d_i := 2.076  # cm
σ_s := 4*β*M_max/(z*l*h*(D + d_i)) = 913.343  # daN/cm^2
# Verificarea canelurii la forfecare
τ_f := 4*β*M_max/(z*l*b*(D + d_i)) = 675.874  # daN/cm^2
# Calculul discului condus
# Verificarea niturilor de fixare a discului pe butuc
# - verificarea la forecare
# - raza cercului pe care sunt dispuse niturile:
r_n := 68  # mm
β := 1.5
# - numărul niturilor:
z_n := 12
# - diametrul nitului se adoptă:
d_n := 8  # mm
# - secțiunea transversală a nitului:
A_n := π*d_n = 25.1327  # mm
360/12 = 30
# - lungimea părții active a nitului se adoptă:
l_n := 6  # mm
τ_f := 10^5*β*M_max/(r_n*z_n*A_n*l_n) = 292.564  # N/cm^2
# Solicitarea admisibilă
τ_af < 300  # daN/cm^2
# Niturile calculate rezistă la solicitarea de forfecare.
# - verificarea niturilor la strivire
τ_s := M_c*10^5/(r_n*z_n*d_n*l_n) = 857.843
# Solicitarea admisibilă
τ_as < 900  # daN/cm^2
# Niturile rezistă la solicitarea de strivire.
# Calculul și verificarea niturilor de fixare a garniturilor de fricțiune pe disc
r_ng := R_med
# - raza cercului pe care sunt dispuse niturile:
r_ng = 95  # mm
# - numărul niturilor:
z_ng := 16
# - diametrul nitului se adoptă:
d_ng := 6  # mm
# - secțiunea transversală a nitului:
A_ng := π*d_ng = 18.8496  # mm
# - lungimea părții active a nitului se adoptă:
l_ng := 4.2  # mm
τ_fng := M_c*10^5/(r_ng*z_ng*A_ng*l_ng) = 279.219  # daN/cm^2
# Solicitarea admisibilă
τ_afng < 300  # daN/cm^2
# Niturile rezistă la solicitarea de forfecare.
τ_fs := M_c*10^5/(r_ng*z_ng*d_ng*l_ng) = 877.193  # daN/cm^2
# Solicitarea admisibilă
τ_asng < 900  # daN/cm^2
# Niturile rezistă la solicitarea de strivire.
# Calculul arcurilor elementului elastic suplimentar
ϕ := 0.8
G_1 := 755  # daN  # - greutatea repartizată pe puntea motoare
r_r = 0.295994  # m  # - raza de rulare a roții
i_0 = 2.73044  # - raportul de transmitere al transmisiei principale
i_s1 := 3.81  # - raportul de transmitere al treptei întâi a cutiei de viteze
M_e := G_1*ϕ*r_r/(i_0*i_s) = 17.1855  # daN*m
# Forța Fe care solicită un arc al elementului suplimentar elastic este dată de relația:
F_e := M_e/(z_e*R_e)  # error: This variable is undefined.  # daN
# în care:
z_e := 4  # - numărul arcurilor elementului elastic suplimentar
R_e := 45  # mm  # - raza de dispunere a arcurilor
R_e := 45*10^-3 = 0.045  # m
F_e := M_e/(z_e*R_e) = 95.475  # daN
# În general arcurile elementului elastic suplimentar au următoarele caracteristici:
# - diametrul sârmei: d=3...4 mm
d_arc := 4
# - diametrul exterior al arcului: D=14...19 mm
D_arc := 19
# - numărul total de spire:
n_s := 6
d_arc := 0.4
D_arc := 1.9
τ_ai := 8000...10000  # error: This variable is undefined.
daN/cm^2
c_arc := D_arc/d_arc = 4.75
k := (4*c_arc - 1)/(4*(c_arc - 1)) + 0.615/c_arc = 1.32947
τ_i := 8*k*F_e*D_arc/(π*d_arc^3) = 9595.85  # daN/cm^2
# Arcurile elementului elastic suplimenter rezistă solicitărilor de torsiune.
# Capetele arcurilor se sprijină pe ferestrele executate în disc și în butuc.
# Lungimea ferestrei
l_f
# se face mai mică decât lungimea liberă a arcului cu aproximativ
# 15...20%, astfel încât arcurile la montare se pretensionează.
# Pentru dimensiunile ferestrelor se recomandă următoarele valori:
# l_f | =25...50 | mm
# R_e | =40...60 | mm
# A | =1.4...1.6 | mm
# înclinarea capetelor: 1-1.5 deg
# tăietura în butuc:
B := d + λ_r + λ_m  # error: This variable is undefined.
# în care:
# d- diametrul limitatorului; λr și λm sunt jocurile dintre limitator și butuc, care caracterizează deformația maximă a arcurilor la transmiterea momentului de la roată.
# Calculul discului de presiune
# Dimensionarea și verificarea plăcii de presiune la solicitări mecanice
# - raza exterioară:
r_ed := R_max + 4 = 116.5
# - raza interioară:
r_id := R_min - 4 = 71
# Calculul și dimensionarea niturilor de fixare a plăcii de presiune pe carcasa ambreiajului
# z- numărul de reazeme sau bolțuri de ghidare. Se alege constructiv
z := 7
# A- suprafața de strivire. Se adoptă:
A := 40  # mm^2
# R- raza de dispunere a bolțurilor de ghidare. Se adoptă:
R := 120  # mm
# Presiunea specifică de strivire se determină cu relația:
p_s := β*M_max*10^4/(R*z*A) = 107.143  # daN/cm^2
# Presiunea specifică admisă la strivire este: psa=100...120 daN/cm2, deci niturile de fixare și ghidare vor rezista presiunii specifice de strivire.
# Calculul la încălzire și transfer termic a plăcii de presiune
# Verificarea la încalzire se face pentru discurile de presiune se face cu relatia:
Δt := α*L/(c*m_p)  # error: This variable is undefined.  # unde:
# L- lucru mecanic de patinare
# α- coeficient care exprimă partea din lucru mecanic preluat de discul de presiune al ambreiajului
α := 0.5
# m_p | - masa pieselor ce se încălzesc
# c- căldura specifică a pieselor din fontă și oțel
c := 500
ro_fonta := 7800
h_p := 0.01  # m
m_p := ro_fonta*h_p*((2*r_ed*10^-3)^2 - (2*r_id*10^-3)^2)*π/4 = 2.09053  # kg
Δt := α*L_f*10/(c*m_p) = 1.6673
# Mecanismul de acționare a ambreiajului
# Se va folosi un mecanism mecanic de acționare a ambreiajului
# Forța la pedală:
# F- forța de apăsare asupra discurilor
# im- raportul de transmitere mecanic se recomandă a fi între 35 și 45
# ip- raportul de transmitere al pârghiilor de debreiere
e := 50  # mm
f := 22  # mm
i_p := e/f = 2.27273
# it- raportul de transmitere al pedalei și al furcii ambreiajului:
a := 150  # mm
b := 22  # mm
c := 60  # mm
d := 20  # mm
i_t := a*c/(b*d) = 20.4545
i_m := i_p*i_t = 46.4876
# ηa= 0.8...0.85 - randamentul mecanismului de acționare
η_a := 0.85
F_p := F/(i_m*η_a) = 149.179  # N
# Cursa totală a manșonului de decuplare:
S_1 := 2  # mm  # - cursa liberă a manșonului
j_a := 0.8  # mm  # - jocul care trebuie realizat între fiecare pereche de suprafețe de frecare pentru o decuplare completă a ambreiajelor
S_p := (S_1*j_a*i_p*i)*i_t = 148.76  # mm
S_p
# trebuie să se încadreze între limitele 100...150 mm pentru autoturisme.
