# Proiect C.C.A. I - calculul ambreiajului cu arc diafragma:
# Determinarea momentului de calcul + alte valori necesare:
β := 1.35
M_m.prim := 12.4  # [daN x m];
M_m := 124  # [N x m];
M_c := β*M_m = 167.4  # [N x m];
R_e.prim := 105  # [mm];
R_i.prim := 75  # [mm];
D_e.prim := 210  # [mm];
d_i.prim := 150  # [mm];
λ := 27.7  # [cm^2/daN x m];
i := 2
C := 0.71
π = 3.14159
R_e := 10*sqrt(λ*M_m.prim/(π*(1 - C^2)*i)) = 104.994  # [mm];
R_i := C*R_e = 74.5456  # [mm];
2*R_e = 209.988  # [mm];
2*R_i = 149.091  # [mm];  # aproximative cu valorile reale, din service;
R_m.prim := 2/3*(R_e.prim^3 - R_i.prim^3)/(R_e.prim^2 - R_i.prim^2) = 90.8333  # [mm];
R_m := 2/3*(R_e^3 - R_i^3)/(R_e^2 - R_i^2) = 90.6303  # [mm];
# Garniturile de frecare:
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A := π*(R_e^2 - R_i^2)*i = 34348  # [mm^2];
μ := 0.27
F := M_c/(μ*i*R_m) = 3.42049  # [daN];
D_e := 2*R_e = 209.988  # [mm];
D_e.cm := 2*R_e*10^-1 = 20.9988  # [cm];
D_i.cm := 2*R_i*10^-1 = 14.9091  # [cm];
D_i := 2*R_i = 149.091  # [mm];
grosimea := 7  # [mm];
M_max := M_m.prim*10^2 = 1240  # [daN x cm];
p_0 := 4*β*M_m.prim/(π*μ*i*(D_e.cm^2 - D_i.cm^2)*R_m*10^-3) = 1.99167  # [daN / cm^2];
# se incadreaza pentru garniturile de azbest;
# Lucrul mecanic de patinare:
n_P := 5100  # [rot / min];
n_v.max := 1.15*n_P = 5865  # [rot / min];
v_max := 45.5556  # [m/s];
v_max.prim := 164  # [km / h];
B := 185  # [mm];
d := 381  # [mm];
H := 0.65*B = 120.25
D_u := d + 2*H = 621.5  # [mm];
r_n := D_u/2 = 310.75  # [mm];
r_0 := r_n
λ_j.pres := 0.9333
r_r := λ_j.pres*r_0 = 290.023
r_r.metri := r_r*10^-3 = 0.290023  # [m];
i_0 := π*n_v.max*r_r.metri/(30*v_max) = 3.91009
p_a := 1.2  # [bar];
α_max := 20*deg  # [grade];
f_rul := (0.019/nthroot(p_a^2, 3) + 0.00245/sqrt(p_a)*(v_max/100)^2 + 0.0042/nthroot(p_a^4, 3)*(v_max/100)^3) = 0.017601
ψ := f_rul*cos(α_max) + sin(α_max) = 0.35856
m := 1150  # [kg];
i_s := 3.61  # conform Haynes;
k := 50  # [daN x cm^2];
G_a := m*0.98 = 1127  # [daN];
n := 500  # [rot / min];
g := 9.81  # [m/s^2];
L := π*n*r_r.metri^2/(30*3.61^2)*(G_a/g*π*n/3600 + G_a^2*ψ^2/k + 2/3*G_a*ψ*sqrt(2/k*G_a/g*π*n/30)) = 2532.85  # [Nxm];
# Lucrul mecanic specific, de patinare:
A_cm.patrati := A*10^-2 = 343.48  # [cm^2];
i = 2
L = 2532.85  # [Nxm];
L_s := L/(i*A_cm.patrati) = 3.68704  # [Nxm];
# Gradientul termic, al pieselor ambreiajului:
# verificarea la incalzire, pentru discul de presiune:
α := 0.5
c := 480  # [J / Kg x grad];
G_p := 30  # [N];
Δτ := α*L/(c*G_p) = 0.0879461
# Calculul arcului tip diafragma:
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F := 2*β*M_m/(i*μ*(R_e + R_i)) = 3.45328
E := 2.1*10^4  # [daN / mm^2];
b := 100
c := 83
d_1 := 112.15
e := 14
l_M := 3
d_2 := 62.04
a := 80
d_3 := 28  # - dimensiunile arcului diafragma;
s := 1.5
H := 10
h := 3
z := 20
α := 360/z = 18
Q := F*(d_1 - d_2)/(d_2 - d_3) = 5.08355
M_1 := F/2*(d_1 - d_2) = 86.5219
F_1 := F/z = 0.172664
M_2 := Q/2*(d_2 - d_3) = 86.5219
M_2x := F/2*(d_2 - d_1) = -86.5219
T_1 := F = 3.45328
Q_1 := Q/z = 0.254177
T_2 := Q = 5.08355
f_1 := 1
f_prim.2 := 0.7
f_2 := f_1*(c - e)/(b - c) = 4.05882
F_1 := π*E*h^4/(6*(b - c)^2)*f_1/h*ln(b/a*(1 + (H/h - f_1/h*(b - a)/(c - a))*(H/h - f_1/(2*h)*(b - a)/(c - a)))) = 1507.05
F_2 := π*E*h^4/(6*(b - c)^2)*f_1/h*ln(b/a)*((H/h - f_1/h*(b - a)/(b - c))*(H/h - f_1/(2*h)*(b - a)/(b - c)) + 1) = 2344.37
μ = 0.27
α_incl := H/(b - e) = 0.116279
d := (b - a)/ln(b/a) = 89.6284
η := l_M*z/(π*(a + e)) = 0.203177
f := 1.7*h = 5.1
σ_ech := F_2/(h^2*η) + E/(2*(1 + μ^2))*((d - a)*α_incl^2 + h*α_incl)/a = 1340.66
q_1 := f*(d_2 - d_3)/(d_1 - d_2) = 3.46446
ψ := 1.250
I := b*s^3/12 = 28.125
q_2 := ψ*Q*(d_2 - d_3)^3/(24*z*E*I) = 0.000884081
q := q_1 + q_2 = 3.46534
k_1 := 1/π*(1 - d_2/d_1)^2/((d_1 + d_2)/(d_1 - d_2) - 2/ln(d_1/d_2)) = 0.647755
k_2 := 6/(π*ln(d_1/d_2))*((d_1/d_2 - 1)/ln(d_1/d_2) - 1) = 1.17494
k_3 := 3/(π*ln(d_1/d_2))*(d_1/d_2 - 1) = 1.30275
σ_t.max := 4*E*f/((1 - μ^2)*k_1*d_1^2)*(k_1*(h - f/2) + k_3*s) = 127.364
F_xxy := (4*E*s*f/((1 - μ^2)*k_1*d_1^2)*((h - f)*((h - f)/2) + s^2))/10^2 = 3.79011
# Calculul arborelui ambreiajului:
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l_can := 30
z_can := 17
b_arb := 1.5
h = 3
D_e.arb := 19.09  # [mm];
τ_ta := 2854
D_i.arb := 10*nthroot(β*M_max/(0.2*τ_ta), 3) = 14.3139  # [mm];
D_i.arb.mas := 14.31  # [mm];
F_arb := 4*β*M_max/(D_e.arb + D_i.arb) = 200.456
p_s := 4*β*M_max/(z_can*l_can*h*(D_e.arb + D_i.arb)) = 0.131017
M_c.1 := M_c*10^3 = 167400
M_max.1 := M_max*10^2 = 124000
τ_t := M_c.1/(0.2*D_i.arb^3) = 285.4
σ_1 := 8*M_max.1/(z_can*l_can*(D_e.arb^2 - D_i.arb^2)) = 12.1918
τ_f := 4*M_max.1/(z_can*l_can*(D_e.arb + D_i.arb)) = 29.1149
# Calcului mecanismului de actionare:
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a_mec := 250
b_mec := 25
c_mec := 46
d_mec := 26
e_mec := 50
f_mec := 27
i = 2
i_m := a_mec/b_mec*c_mec/d_mec*e_mec/f_mec = 32.7635
i_m.adoptat := 33
S_i := 3
ΔS := 1.3
S_m := S_i + ΔS*i*e_mec/f_mec = 7.81481
S_p := S_m*a_mec/b_mec*c_mec/d_mec = 138.262
F_p := 12
# Calculul discului condus:
d_nit := 6
z_nit := 16
r_nit := R_m = 90.6303
A_nit := 28.321
l_nit := 6
τ_forf := β*M_max*10^3/(r_nit*z_nit*A_nit) = 40.7618
p_ss := β*M_max*10^3/(r_nit*z_nit*d_nit*l_nit) = 32.0671
φ := 0.8
M_e := G_a*φ*r_r/(i_0*i_s*10^2) = 185.247
r_e := 31
z_e := 4
F_e := M_e/(z_e*r_e) = 1.49393
# Calculul discului de presiune:
z_b.g := 3
A = 34348
A_cm.2 := A/10^2 = 343.48
R_e = 104.994
R_i = 74.5456
R_e.cm := R_e/10 = 10.4994
R_i.cm := R_i/10 = 7.45456
R_ext.d.pres := R_e.cm + 0.2 = 10.6994
R_int.d.pres := R_i.cm - 0.2 = 7.25456
grosimea_d.pres := 15
p_spec.striv := β*M_max/(R_ext.d.pres*z_b.g*A_cm.2) = 0.151836  # [daN / cm^2];
ρ_fonta := 8400
Δ := 14
m_d.pres := (π*(R_ext.d.pres^2 - R_int.d.pres^2)*Δ*ρ_fonta)/10^7 = 2.28499
