# Proiect C.C.M.A.I. I - calculul si proiectarea bielei:
# Piciorul bielei:
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d_eb := 18.609  # [mm];
d_i := 20.609  # [mm];  # contine si bucsa;
h_b := d_i - d_eb = 2  # [mm];
h_p := d_eb*0.27 = 5.02443  # [mm];
d_e := d_eb*1.65 = 30.7049  # [mm];
l_b := 1.25*d_eb = 23.2613  # [mm];
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b := 16  # [mm];
L_b := 146.25  # [mm];
# Verificarea piciorului bielei:
λ := 1/3 = 0.333333
n := 1300  # [rot/min];
ω := π*n/30 = 136.136  # [rad/s];
S := 74.3  # [mm];
r := S/2*10^-3 = 0.03715  # [m];
D := 77.2  # [mm];
r_mm := r*10^3 = 37.15  # [mm];
L_biela.x := S/(2*λ) = 111.45
m_b := 22*(π*D^2/4)*10^-5 = 1.02979  # [Kg];  # masa bielei;
m_b1 := m_b*0.275 = 0.283191  # [Kg];  # masa piciorului;
m_b2 := m_b - m_b1 = 0.746595  # [Kg];  # masa capului;
m_p := 405*10^-3 = 0.405  # [Kg];
m_it := m_p + m_b1 = 0.688191  # [Kg];
F_it := -m_it*ω^2*r*(1 + λ) = -631.758  # [N];
F_it.plus := (-1)*F_it = 631.758  # [N];
A_A_A := h_p*l_b = 116.875  # [mm^2];
σ_tp := F_it.plus/(2*A_A_A) = 2.70272  # [N/mm^2];
# OLC 60 are 710 [N/mm^2]; | - se verifica;
# incovoiere:
r_1 := (d_e + d_eb)/4 = 12.3285  # [mm];  # raza fibrei medii;
W_B_B := l_b*(h_p + h_b)^2/6 = 191.295  # [mm^3];
σ_ip := F_it.plus*r_1/(2*W_B_B) = 20.3576  # [N/mm^2];
710*1.1 = 781  # [N/mm^2];  # OLC 60 se incadreaza;
# Calculul corpului bielei:
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d_e = 30.7049  # [mm];  # Verificari:  # intindere, compresiune si flambaj;
H_p := 0.8*d_e = 24.5639  # [mm];
p_max := 100  # [N/mm^2];
π = 3.14159
H_c := 1.39*H_p = 34.1438  # [mm];
e := 0.584*H_p = 14.3453  # [mm];
F_c := π*D^2/4*p_max - m_it*r_mm*ω^2*(1 + λ) = -163673  # [N];
B := 0.7*H_p = 17.1947  # [mm];
F_c.plus := (-1*F_c) = 163673  # [N];
h := 0.668*H_p = 16.4087  # [mm];
A_c := H_p*B - e*h = 186.982  # [mm^2];
a := 0.167*H_p = 4.10217  # [mm];
k := 1.1  # ia in considerare flambajul;
σ_c := k*F_c.plus/A_c = 962.878  # [N/mm^2];
σ_t := F_it.plus/A_c = 3.37872  # [N/mm^2];
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# Calculul capului bielei:
# se presupune ca cilindrii sa fie asezati in linie;
D = 77.2  # [mm];
d_M := 0.61089*D = 47.1607  # [mm];  # diametrul fusului maneton;
l_M := 0.6*d_M = 28.2964  # [mm];  # lungimea fusului maneton;
ρ := 0.09*d_M = 4.24446  # [mm];  # raza de racordare;
L := l_M - 2*ρ = 19.8075  # [mm];  # lungimea capului bielei;
grosime_cuzinet := 2  # [mm];
D_i := d_M + 2*1.8648 = 50.8903  # [mm];
h_i := 1.5  # [mm];
h_e := 2  # [mm];
d_s := 10  # [mm];
l := D_i + 2*h_i + 2*h_e + 2*d_s = 77.8903  # [mm];
# verificare:
m_br := m_b2
m_cb := m_b1
F_i := -m_it*r*ω^2*(1 + λ) - (m_br - m_cb)*r*ω^2
F_i = -950.811
F_i.plus := -1*F_i = 950.811
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h_c := 50  # [mm];
W_C_C := L*h_c^2/6 = 8253.12  # [mm^3];
r_2 := D_i/2 + h_i + d_s/2 = 31.9452  # [mm];
σ_i := F_i.plus*r_2/(2*W_C_C) = 1.84014  # [N/mm^2];
z := 2  # -nr suruburi
c_c := 3  # [mm]
χ := 0.17
β_k := 5.5
ψ := 0.2
ε := 1
γ := 1.5
# -forta care solicitå surubul
F_t := F_i.plus + (m_br - m_cb)*r*ω^2 = 1269.86
F_t' := F_t/2 = 634.932
# coeficientul de amplificare al lui Fs  c.a = (2...3)
c_a := 3
F_s := χ*F_t' = 107.938
# Pentru a avea siguranta cå în timpul functionårii nu se pierde contactul între cele 2 piese trebuie ca:
F_0 := c_a*F_t' = 1904.79
# Forta maximå care solicitå surubul:
F_max := F_0 + F_s = 2012.73
σ_c := 710
# Diametru la fund al filetului:
d_s := sqrt(4*c_c*F_max/(π*σ_c))
d_s = 3.29063
A_s' := π*4^2 = 50.2655
A_s := π*3.291^2 = 34.0256
# se alege
ds1 := 3  # [mm]
# -diametrul partii nefiletate si implicit la
# virfurile filetului
