# 1. Calculul admisiei motorului:
# conditii initiale de stare:
p0 := 1  # bar
T0 := 298  # K
# presiunea la iesirea din suflanta:
ps := 2  # bar
# Exponentul politropic de comprimare in suflanta:
ms := 1.8
# Temperatura aerului dupa suflanta:
Ts := T0*(ps/p0)^((ms - 1)/ms) = 405.515  # K
# Presiunea gazelor reziduale:
pr := 0.85*ps = 1.7  # bar
# pt. motoare supraalimentate
# cu turbosuflanta
# Adoptam temperatuta gazelor reziduale
Tr := 700  # K
# Adoptam valoarea pentru coeficientul gazelor rezid.
Υr := 0.02  # MAC supraalimentat
# Adoptam :
Δpa := 0.05  # pentru motoare supraalimentate
# presiunea din cilindru la sfarsitul admisiei:
pa := p0 - Δpa = 0.95
# temperatura la sfarsitul admisiei:
Ta := 340  # K
# Calculul arderii:
c := 0.857
h := 0.133
o := 0.010
s := 1 - c - h - o
s = 8.67362e-18
# Cantitatea minima de aer necesara arderii complete:
Lmin := 1/0.21*(c/12 + h/4 - o/32) = 0.496925  # kmol aer/kg comb
L1min := 1/0.21*(8/3*c + 8*h - o + s) = 15.9016  # kmol aer/kg comb
L2min := 22.4*Lmin
L2min = 11.1311  # m3 aer/kg comb
# Coeficientul de exces de aer:
α := 2
# Cantitatea reala de aer:
L := α*Lmin = 0.993849  # kmol aer/kg comb
# Masa moleculara a motorinei:
Mc := 190  # kg/kmol
# Numarul de kmoli de combustibil pentru 1 kg de combustibil:
vc := 1/Mc = 0.00526316  # kmol comb/kg comb
# Nr de kmoli de substanta initiala care participa la reactia chimica:
vi := α*Lmin + vc = 0.999112
# Produsele arderii
# Cantitatile combustibililor lichizi:
CO2 := c/12 = 0.0714167  # kmol/kg comb;
H2O := h/2 = 0.0665  # kmol/kg comb;
O2 := 0.21*(α - 1)*Lmin = 0.104354  # kmol/kg comb
N2 := 0.79*α*Lmin = 0.785141  # kmol/kg comb.
# Numarul total de kmoli de produse de ardere:
vpa := c/12 + h/2 + (α - 0.21)*Lmin = 1.02741
# Variatia molara
# Variatia nr de kmoli in urma arderii este:
Δv := vpa - vi = 0.0282993
# Coeficientul chimic de variatie molara:
μc := (α*Lmin + h/4 + o/32)/(α*Lmin + vc) = 1.02832
# Coeficientul total de variatie molara:
μ := 1.04
# Puterea calorica a combustibilului:
Hi := 34013*c + 125600*h - 10900*(o - s) - 2512*(9*h + 0.003)
Hi = 42730.5  # kj/kg
# Presiunea maxima de ardere:
pmax := 120  # bari
D := 81  # mm
# Forta maxima de presiune a gazelor:
Fmax := π*(D/10)^2/4*(pmax/10 - 1) = 566.83  # N
Fmax = 566.83  # N
# 2. Calculul bielei
# 2.1  PICIORUL BIELEI
# Calculul dimensiunilor piciorului bielei
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# FIG 2.1 Principalele dimensiuni ale piciorului bielei .Se considerã boltul fix în bielã si liber în piston .
D := 81  # mm
l_b := 0.321*D
l_b = 26.001  # [mm]
# [7.pag430]
d_eb := 0.4205*D
d_eb = 34.0605  # [mm]
# Grosimea radialã a piciorului h_p se calculeazã cu ajutorul relatiei :
h_p := 0.20*d_eb
# [7.pag488]
h_p = 6.8121  # [mm]
# Grosimea radialã a bucsei , h_b se calculeazã cu ajutorul relatiei :
h_b := 0.067*d_eb
# [7.pag488]
h_b = 2.28205  # [mm]
# Diametrul exterior al piciorului bielei , d_e se calculeazã cu :
d_e := 1.5*d_eb
d_e = 51.0907  # [mm]  # [7.pag488]
# - diametrul interior al bielei
# (contine si bucsa de fretare)
di := 34  # mm
# Latimea bielei
b := 16  # mm
λ := 2/3  # coeficient de sveltete a bielei
S := 95.5  # mm  # cursa pistonului
# Lungimea corpului bielei:
Lb := S/(2*λ) = 71.625
# Verificarea piciorului bielei
# Piciorul bielei se verificã în sectiunile A-A si B-B , pentru pozitia pms la începutul admisiei , cînd fortele de întindere sunt maxime .
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# FIG 3.2.1.2 Fortele ce actioneazã asupra piciorului bielei
F_it == -m_it*ω^2*r*(1 + λ)  # [N]  # [2.pag196]
λ := 1/3  # raportul dintre raza manivelei si lungimea bielei pentru motoare de automobile (bielã lungã)
λ = 0.333333
n := 4000  # [rot/min]
ω := 3.14*n/30
ω = 418.667  # [rad/s]
r := S/2*10^-3  # [m]
r = 0.04775
m_it == m_p + m_b1
# Considerãm biela realizatã din OLC60  STAS 880-88 : | [7.pag386]
m_b := 22*(3.14*D^2/4)*10^-5  # masa bielei
m_b = 1.13308  # [kg]
m_b1 := 0.275*m_b  # masa piciorului bielei  # [7.pag344]
m_b1 = 0.311598  # [kg]
m_b2 := 0.725*m_b  # masa capului bielei  # [7.pag344]
m_b2 = 0.821486  # [kg]
m_p := 0.7  # [kg]
m_it := m_p + m_b1
m_it = 1.0116  # [kg]
F_it := -m_it*ω^2*r*(1 + λ)
F_it = -11289  # [N]
# În acest caz efortul unitar în sectiunea A-A se obtine cu relatia :
F_it := 1.643*10^4  # [N]
A_A_A := h_p*l_b
A_A_A = 177.121  # [mm^2]
σ_tp := F_it/(2*A_A_A)
σ_tp = 46.3806  # [N/mm^2]
# efortul unitar admisibil la tractiune pentru OLC60 este:
σ_at := 710  # [N/mm ^2]
# În sectiunea B-B avem încovoiere :
r_1 := (d_e + d_eb)/4  # r_1-raza fibrei medii  # [2.pag196]
r_1 = 21.2878  # [mm]
W_B_B := l_b*(h_p + h_b)^2/6
W_B_B = 358.396  # [mm^3]
σ_ip := F_it*r_1/(2*W_B_B)
σ_ip = 487.95  # [N/mm^2]
# Efortul unitar admisibil la încovoiere este :
σ_ai := σ_at*1.1
σ_ai = 781  # [N/mm^2]
# 2.2 CALCULUL CORPULUI BIELEI | [7.pag493]
# Calculul dimensiunilor corpului bielei
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# FIG 2.2 Principalele dimensiuni ale corpului bielei
H_p := 0.8*d_e  # d_e-diametrul exterior al piciorului bielei
H_p = 40.8726  # [mm]
H_c := 1.39*H_p
H_c = 56.8129  # [mm]
e := 0.584*H_p
e = 23.8696  # [mm]
B := 0.7*H_p
B = 28.6108  # [mm]
h := 0.668*H_p
h = 27.3029  # [mm]
a := 0.167*H_p
a = 6.82572  # [mm]
# Verificarea corpului bielei | [2.pag196]
# Corpul bielei se verificã la solicitarea de întindere si compresiune , si dacã este cazul , la flambaj .
# Forta care solicitã corpul bielei la întindere Fit este maximã în pms la începutul cursei de admisie , iar forta care solicitã biela la compresiune Fc are valoare maximã tot în pms , la începutul cursei de destindere .
p_max := p_max*0.1  # error: This variable is undefined.
p_max := 120  # [N/mm2]
F_c := π*D^2/4*p_max - m_it*r*ω^2*(1 + λ) = 607071
F_c = 607071  # [N]
# Efortul unitar de compresiune , produs de forta Fc este :
σ_c == F_c./A_c
# unde Ac este aria sectiunii corpului bielei (aria minima)
A_c := H_p*B - e*h
A_c = 517.689  # [mm2]
k := 1.10 .. 1.15  # -coeficient ce ia în considerare flambajul
k := 1.15
σ_c := k*F_c/(2*A_c) = 674.276
σ_c = 674.276
# [N/mm2]
σ_ac := 710  # [N/mm2]
σ_tc < σ_ac
# Efortul unitar de întindere , produs de forta Fit este :
σ_t := F_it/A_c
σ_t = 31.7372  # [N/mm2]
σ_t < σ_ac == 710  # [N/mm2]
# 2.3  CALCULUL CAPULUI BIELEI
# Calculul dimensiunilor capului bielei | [7.pag520]
# Determinãm lungimea fusului maneton , cînd cilindrii sînt asezati în linie :
d_M := 0.74*D  # diametrul fusului maneton
d_M = 59.94  # [mm]
l_M := 0.6*d_M  # lungimea fusului maneton
l_M = 35.964  # [mm]
ρ := 0.09*d_M  # raza de racordare
ρ = 5.3946  # [mm]
# Determinãm lungimea capului bielei ca fiind :
L := l_M - 2*ρ
L = 25.1748  # [mm]
# Considerãm cã cuzinetul are grosimea de 1.5  [mm] , rezultã diametrul interior al capului bielei :
D_i := d_M + 3
D_i = 62.94  # [mm]
# Lãtimea capului bielei este :
h_i := 1.5  # [mm]  grosimea minimã a peretelui interior
h_e := 2  # [mm]  grosimea minimã a peretelui exterior
d_s := 12  # [mm]  diametrul surubului
l := D_i + 2*h_i + 2*h_e + 2*d_s
l = 93.94  # [mm]
# Verificarea capului bielei | [2.pag197]
# Capul bielei este supus la solicitarea maximã de încovoiere în pms la începutul admisiei , cînd la forta de inertie a maselor in miscare de translatie F_it se adunã forta rezultatã dintre diferenta masei bielei în miscare de rotatie m_br si masa capului bielei m_cb , se va folosi relatia :
m_br := m_b2
m_cb := m_b1
F_i := -m_it*r*ω^2*(1 + λ) - (m_br - m_cb)*r*ω^2
F_i = -15556.7  # [N]
F_i := 2.329*10^4  # [N]
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# FIG 2.3.1 Capul bielei
# Efortul unitar maxim în sectiunea C-C din figurã se obtine cu relatia :
h_c := 50  # [mm]  grosimea capului în sectiunea C-C
# modulul de rezistentã al sectiunii C-C
W_C_C := L*h_c^2/6
W_C_C = 10489.5  # [mm3]
r_2 := D_i/2 + h_i + d_s/2
r_2 = 38.97  # [mm]
σ_i := F_i*r_2/(2*W_C_C)
σ_i < σ_ai
σ_i = 43.2628  # [N/mm2]
σ_ai = 781  # [N/mm2]
# Calculul suruburilor
# Suruburile sunt confectionate dintr-un material special si sunt puternic solicitate la obosealå.
# Ele se monteazå cu prestrângere initialå pentru a nu permite jocul între capac si bielå.
# Pe måsurå ce forta de prestrângere creste, surubul se alungeste. Piesele strânse se deformeazå prin comprimare.
Fic := 1.95*10^3
# Otel aliat  cu  σc = (600...1400) MPa
F_t := Fic
σ__1 := 700
σ_c := 1400  # [MPa]
β_k := 5
ψ := 0.2
z := 2  # -nr suruburi
ε := 1
c_c := 1.25  # [mm]
γ := 1.5
σ_c := 1025
χ := 0.17
# -forta care solicitå surubul
F_t' := F_t/2 = 975
F_t = 1950
# coeficientul de amplificare al lui Fs  c.a = (2...3)
c_a := 2.5
F_s := χ*F_t'
F_s = 165.75
# Pentru a avea siguranta cå în timpul functionårii nu se pierde contactul între cele 2 piese trebuie ca:
F_0 := c_a*F_t'
F_0 = 2437.5
# Forta maximå care solicitå surubul:
F_max := F_0 + F_s
F_max = 2603.25
# Diametru la fund al filetului:
d_s := sqrt(4*c_c*F_max/(π*σ_c))
d_s := 7.536
A_s' := π*4^2 = 50.2655
A_s := π*3.768^2 = 44.6038
# se alege
ds1 := 7  # [mm]
# -diametrul partii nefiletate si implicit la
# virfurile filetului
